<Lems>

    <!--

        This LEMS file has been automatically generated using PyNeuroML v0.5.6 (libNeuroML v0.2.52)

     -->

    <!-- Specify which component to run -->
    <Target component="SimDemirtas_network" reportFile="report.SimDemirtas_network.txt"/>

    <!-- Include core NeuroML2 ComponentType definitions -->
    <Include file="Cells.xml"/>
    <Include file="Networks.xml"/>
    <Include file="Simulation.xml"/>

    <Include file="PyNN.xml"/>
    <Include file="Demirtas_network.net.nml"/>
    <Include file="Demirtas_network__lems.xml"/>

    <Simulation id="SimDemirtas_network" length="1000.0ms" step="0.1ms" target="Demirtas_network" seed="5678">  <!-- Note seed: ensures same random numbers used every run -->

        <Display id="Excitatory_0_S" title="Plots of Excitatory_0_S" timeScale="1ms" xmin="-100.0" xmax="1100.0" ymin="-1" ymax="1">
            <Line id="Excitatory_0_Exc_S" quantity="Excitatory/0/Exc/S" scale="1" color="#d54f33" timeScale="1ms"/>
        </Display>

        <Display id="Excitatory_0_e" title="Plots of Excitatory_0_e" timeScale="1ms" xmin="-100.0" xmax="1100.0" ymin="-1" ymax="1">
            <Line id="Excitatory_0_Exc_e" quantity="Excitatory/0/Exc/e" scale="1" color="#0534e4" timeScale="1ms"/>
        </Display>

        <Display id="Excitatory_0_f" title="Plots of Excitatory_0_f" timeScale="1ms" xmin="-100.0" xmax="1100.0" ymin="-1" ymax="1">
            <Line id="Excitatory_0_Exc_f" quantity="Excitatory/0/Exc/f" scale="1" color="#98e752" timeScale="1ms"/>
        </Display>

        <Display id="Excitatory_0_iTotal" title="Plots of Excitatory_0_iTotal" timeScale="1ms" xmin="-100.0" xmax="1100.0" ymin="-1" ymax="1">
            <Line id="Excitatory_0_Exc_iTotal" quantity="Excitatory/0/Exc/iTotal" scale="1" color="#bca074" timeScale="1ms"/>
        </Display>

        <Display id="Excitatory_0_internalNoise" title="Plots of Excitatory_0_internalNoise" timeScale="1ms" xmin="-100.0" xmax="1100.0" ymin="-1" ymax="1">
            <Line id="Excitatory_0_Exc_internalNoise" quantity="Excitatory/0/Exc/internalNoise" scale="1" color="#632794" timeScale="1ms"/>
        </Display>

        <Display id="Excitatory_0_nu" title="Plots of Excitatory_0_nu" timeScale="1ms" xmin="-100.0" xmax="1100.0" ymin="-1" ymax="1">
            <Line id="Excitatory_0_Exc_nu" quantity="Excitatory/0/Exc/nu" scale="1" color="#8a5d88" timeScale="1ms"/>
        </Display>

        <Display id="Excitatory_0_r" title="Plots of Excitatory_0_r" timeScale="1ms" xmin="-100.0" xmax="1100.0" ymin="-1" ymax="1">
            <Line id="Excitatory_0_Exc_r" quantity="Excitatory/0/Exc/r" scale="1" color="#df5954" timeScale="1ms"/>
        </Display>

        <Display id="Inhibitory_0_S" title="Plots of Inhibitory_0_S" timeScale="1ms" xmin="-100.0" xmax="1100.0" ymin="-1" ymax="1">
            <Line id="Inhibitory_0_Inh_S" quantity="Inhibitory/0/Inh/S" scale="1" color="#52c8bf" timeScale="1ms"/>
        </Display>

        <Display id="Inhibitory_0_e" title="Plots of Inhibitory_0_e" timeScale="1ms" xmin="-100.0" xmax="1100.0" ymin="-1" ymax="1">
            <Line id="Inhibitory_0_Inh_e" quantity="Inhibitory/0/Inh/e" scale="1" color="#bf0239" timeScale="1ms"/>
        </Display>

        <Display id="Inhibitory_0_f" title="Plots of Inhibitory_0_f" timeScale="1ms" xmin="-100.0" xmax="1100.0" ymin="-1" ymax="1">
            <Line id="Inhibitory_0_Inh_f" quantity="Inhibitory/0/Inh/f" scale="1" color="#3f9fe8" timeScale="1ms"/>
        </Display>

        <Display id="Inhibitory_0_iTotal" title="Plots of Inhibitory_0_iTotal" timeScale="1ms" xmin="-100.0" xmax="1100.0" ymin="-1" ymax="1">
            <Line id="Inhibitory_0_Inh_iTotal" quantity="Inhibitory/0/Inh/iTotal" scale="1" color="#dda9d2" timeScale="1ms"/>
        </Display>

        <Display id="Inhibitory_0_internalNoise" title="Plots of Inhibitory_0_internalNoise" timeScale="1ms" xmin="-100.0" xmax="1100.0" ymin="-1" ymax="1">
            <Line id="Inhibitory_0_Inh_internalNoise" quantity="Inhibitory/0/Inh/internalNoise" scale="1" color="#85ad96" timeScale="1ms"/>
        </Display>

        <Display id="Inhibitory_0_nu" title="Plots of Inhibitory_0_nu" timeScale="1ms" xmin="-100.0" xmax="1100.0" ymin="-1" ymax="1">
            <Line id="Inhibitory_0_Inh_nu" quantity="Inhibitory/0/Inh/nu" scale="1" color="#59438f" timeScale="1ms"/>
        </Display>

        <Display id="Inhibitory_0_r" title="Plots of Inhibitory_0_r" timeScale="1ms" xmin="-100.0" xmax="1100.0" ymin="-1" ymax="1">
            <Line id="Inhibitory_0_Inh_r" quantity="Inhibitory/0/Inh/r" scale="1" color="#5fa56f" timeScale="1ms"/>
        </Display>

        <OutputFile id="Excitatory_0_S_dat" fileName="Excitatory_0.S.dat">
            <OutputColumn id="Excitatory_0_Exc_S" quantity="Excitatory/0/Exc/S"/>
        </OutputFile>

        <OutputFile id="Excitatory_0_e_dat" fileName="Excitatory_0.e.dat">
            <OutputColumn id="Excitatory_0_Exc_e" quantity="Excitatory/0/Exc/e"/>
        </OutputFile>

        <OutputFile id="Excitatory_0_f_dat" fileName="Excitatory_0.f.dat">
            <OutputColumn id="Excitatory_0_Exc_f" quantity="Excitatory/0/Exc/f"/>
        </OutputFile>

        <OutputFile id="Excitatory_0_iTotal_dat" fileName="Excitatory_0.iTotal.dat">
            <OutputColumn id="Excitatory_0_Exc_iTotal" quantity="Excitatory/0/Exc/iTotal"/>
        </OutputFile>

        <OutputFile id="Excitatory_0_internalNoise_dat" fileName="Excitatory_0.internalNoise.dat">
            <OutputColumn id="Excitatory_0_Exc_internalNoise" quantity="Excitatory/0/Exc/internalNoise"/>
        </OutputFile>

        <OutputFile id="Excitatory_0_nu_dat" fileName="Excitatory_0.nu.dat">
            <OutputColumn id="Excitatory_0_Exc_nu" quantity="Excitatory/0/Exc/nu"/>
        </OutputFile>

        <OutputFile id="Excitatory_0_r_dat" fileName="Excitatory_0.r.dat">
            <OutputColumn id="Excitatory_0_Exc_r" quantity="Excitatory/0/Exc/r"/>
        </OutputFile>

        <OutputFile id="Inhibitory_0_S_dat" fileName="Inhibitory_0.S.dat">
            <OutputColumn id="Inhibitory_0_Inh_S" quantity="Inhibitory/0/Inh/S"/>
        </OutputFile>

        <OutputFile id="Inhibitory_0_e_dat" fileName="Inhibitory_0.e.dat">
            <OutputColumn id="Inhibitory_0_Inh_e" quantity="Inhibitory/0/Inh/e"/>
        </OutputFile>

        <OutputFile id="Inhibitory_0_f_dat" fileName="Inhibitory_0.f.dat">
            <OutputColumn id="Inhibitory_0_Inh_f" quantity="Inhibitory/0/Inh/f"/>
        </OutputFile>

        <OutputFile id="Inhibitory_0_iTotal_dat" fileName="Inhibitory_0.iTotal.dat">
            <OutputColumn id="Inhibitory_0_Inh_iTotal" quantity="Inhibitory/0/Inh/iTotal"/>
        </OutputFile>

        <OutputFile id="Inhibitory_0_internalNoise_dat" fileName="Inhibitory_0.internalNoise.dat">
            <OutputColumn id="Inhibitory_0_Inh_internalNoise" quantity="Inhibitory/0/Inh/internalNoise"/>
        </OutputFile>

        <OutputFile id="Inhibitory_0_nu_dat" fileName="Inhibitory_0.nu.dat">
            <OutputColumn id="Inhibitory_0_Inh_nu" quantity="Inhibitory/0/Inh/nu"/>
        </OutputFile>

        <OutputFile id="Inhibitory_0_r_dat" fileName="Inhibitory_0.r.dat">
            <OutputColumn id="Inhibitory_0_Inh_r" quantity="Inhibitory/0/Inh/r"/>
        </OutputFile>

    </Simulation>

</Lems>
